*Heading
** Job name: Job-2 Model name: Model-1
** Generated by: Abaqus/CAE Learning Edition 2024
*Preprint, echo=NO, model=NO, history=NO, contact=NO
**
** PARTS
**
*Part, name=Part-1
*Node
      1,         100.,        0.125
      2,           0.,        0.125
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*Element, type=CPS8
 1,   1,  11, 142,   4, 341, 342, 343, 344
 2,  11,  12, 141, 142, 345, 346, 347, 342
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*Nset, nset=Set-1, generate
   1,  947,    1
*Elset, elset=Set-1, generate
   1,  268,    1
*Nset, nset=Set-5, generate
   1,  947,    1
*Elset, elset=Set-5, generate
   1,  268,    1
*Nset, nset=Set-6
   1,   2,   5,   6,   7,   8
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*Elset, elset=Set-6, generate
  68,  201,    1
*Nset, nset=Set-7
   1,   2,   3,   4,   5,   6
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*Elset, elset=Set-7
   1,   2,   3,   4,   5,   6
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*Nset, nset=Set-8
   1,   2,   3,   4,   5,   6
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*Elset, elset=Set-8
   1,   2,   3,   4,   5,   6
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*Nset, nset=Set-9
   5,   6,   7,   8, 143, 144
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*Elset, elset=Set-9, generate
  68,  134,    1
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*Elset, elset=Set-16
  68,  69,  70,  71,  72,  73
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*Nset, nset=Set-17
   1,   2,   3,   4,   9,  10
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*Elset, elset=Set-17
   1,   2,   3,   4,   5,   6
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*Orientation, name=Ori-1
1., 0., 0., 0., 1., 0.
3, 0.
** Section: Section-2
*Solid Section, elset=Set-17, orientation=Ori-1, stack direction=1, material=Material-90
,
** Section: Section-1
*Solid Section, elset=Set-16, orientation=Ori-1, stack direction=1, material=Material-1
,
*End Part
**
**
** ASSEMBLY
**
*Assembly, name=Assembly
**
*Instance, name=Part-1-1, part=Part-1
*End Instance
**
*Nset, nset=Set-1, instance=Part-1-1
 7,
*Nset, nset=Set-2, instance=Part-1-1
   2,   3,   5,   8,  10, 541, 546, 879, 881
*Elset, elset=Set-2, instance=Part-1-1
  67,  68, 201, 202
*End Assembly
**
** MATERIALS
**
*Material, name=Material-1
*Elastic, type=ENGINEERING CONSTANTS
130000.,9530.,9530., 0.34, 0.34,  0.4,4730.,4730.
3180.,
*Material, name=Material-90
*Elastic, type=ENGINEERING CONSTANTS
9530.,   9530., 130000.,     0.4, 0.00365, 0.00365,   3180.,   4730.
   4730.,
** ----------------------------------------------------------------
**
** STEP: Step-1
**
*Step, name=Step-1, nlgeom=YES
*Static
0.01, 1., 1e-05, 0.1
**
** BOUNDARY CONDITIONS
**
** Name: BC-1 Type: 対称/反対称/完全固定
*Boundary
Set-2, PINNED
**
** LOADS
**
** Name: Load-1   Type: Concentrated force
*Cload
Set-1, 2, -0.0372
**
** OUTPUT REQUESTS
**
*Restart, write, frequency=0
**
** FIELD OUTPUT: F-Output-1
**
*Output, field, variable=PRESELECT
**
** HISTORY OUTPUT: H-Output-1
**
*Output, history, variable=PRESELECT
*End Step
